W1(s) := 6/(2*s^2 + 0.68*s + 1)  # Звено колебательное
h5(t) := W1(s) invlaplace → -2.18541896191i*e^((-0.17 + 0.686367248636i)*t) + 2.18541896191i*e^((-0.17 - 0.686367248636i)*t)
# Звено апериодическое
W2(s) := 2/(0.17*s + 1)
h1(t) := W1(s)*1/s invlaplace → 6.0 + (-3.0 + 0.743042447048i)*e^((-0.17 + 0.686367248636i)*t) + (-3.0 - 0.743042447048i)*e^((-0.17 - 0.686367248636i)*t)
t := 0, 0.05 .. 20
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h2(t) := W2(s)*1/s invlaplace → 2.0 - 2.0*e^(-5.88235294118*t)
t := 0, 0.05 .. 20
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Wp(s) := 0.03*W1(s)*W2(s)
W3(s) := Wp(s)/(1 + Wp(s)) simplify → (3.15544362088e-30*s + 1.05882352941)/((s + 5.91399308934)*(s^2 + 0.308359851836*s + 0.676361967215))
h3(t) := W3(s)*1/s invlaplace → 0.264705882353 - 0.259413320299*cos(0.807830748151*t)*e^(-0.154179925918*t) - 0.0882567320972*sin(0.807830748151*t)*e^(-0.154179925918*t) - 0.00529256205425*e^(-5.91399308934*t)
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t := 0, 0.001 .. 25
t := 0, 0.01 .. 25
h4(t) := W1(s) invlaplace → -2.18541896191i*e^((-0.17 + 0.686367248636i)*t) + 2.18541896191i*e^((-0.17 - 0.686367248636i)*t)
h6(t) := W3(s) invlaplace → 0.0313001754137*e^(-5.91399308934*t) - 0.0313001754137*cos(0.807830748151*t)*e^(-0.154179925918*t) + 0.223169473034*sin(0.807830748151*t)*e^(-0.154179925918*t)
h5(t) := W2(s) invlaplace → 11.7647058824*e^(-5.88235294118*t)
t := 0, 0.01 .. 30
t := 0, 0.001 .. 30
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