# Задание 1 | ОБЪЕКТ УПРАВЛЕНИЯ
W1(s) := 6/(2*s^2 + 0.68*s + 1)
A1(ω) := |W1(1i*ω)| → 6/|0.68i*ω - 2*ω^2 + 1|
ω := 0, 0.001 .. 10
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# АЧХ ОУ
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# ЛАЧХ ОУ
# ФЧХ ОУ | ЛФЧХ ОУ
W1im(ω) := Im(W1(ω*1i))
W1re(ω) := Re(W1(ω*1i))
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# АФЧХ ОУ
# ИСПОЛНИТЕЛЬНОЕ УСТРОЙСТВО
W2(s) := 2/(0.17*s + 1)
A2(ω) := |W2(1i*ω)| → 2/|0.17i*ω + 1|
ω := 0, 0.1 .. 200
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# АЧХ ИУ
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# ЛАЧХ ИУ
# ФЧХ ИУ | ЛФЧХ ИУ
W2im(ω) := Im(W2(ω*1i))
W2re(ω) := Re(W2(ω*1i))
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# Задание 2 | Последовательное соединение (прямая цепь)
K1 := 0.03
ω := 0, 0.005 .. 300
Wsist1(S) := K1*W2(S)*W1(S) → 0.36/((0.17*S + 1)*(0.68*S + 2*S^2 + 1))
Asist1(ω) := |Wsist1(1i*ω)| → 0.36/(|0.17i*ω + 1|*|0.68i*ω - 2*ω^2 + 1|)
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# АЧХ соед | ЛАЧХ соед
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# ФЧХ соед | ЛФЧХ соед
Wsist1im(ω) := Im(Wsist1(ω*1i))
Wsist1re(ω) := Re(Wsist1(ω*1i))
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# АФЧХ соед
# Замкнутая система по выходному сигналу
W3(S) := K1*W1(S)*W2(S)/(1 + W1(S)*W2(S)*K1)
A3(ω) := |W3(1i*ω)| → 0.36/(|0.36/((0.17i*ω + 1)*(0.68i*ω - 2*ω^2 + 1)) + 1|*|0.17i*ω + 1|*|0.68i*ω - 2*ω^2 + 1|)
ω := 0, 0.001 .. 300
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# АЧХ ЗС по вых
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# ЛАЧХ ЗС по вых
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# ФЧХ ЗС по вых
# ЛФЧХ ЗС по вых
W3im(ω) := Im(W3(ω*1i))
W3re(ω) := Re(W3(ω*1i))
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# АФЧХ ЗС по вых
# Замкнутая система по ошибке
W4(S) := 1/(1 + W1(S)*W2(S)*K1)
A4(ω) := |W4(1i*ω)| → 1/|0.36/((0.17i*ω + 1)*(0.68i*ω - 2*ω^2 + 1)) + 1|
ω := 0, 0.001 .. 100
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# АЧХ ЗС по ошибке
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# ЛАЧХ ЗС по ошибке
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# ФЧХ ЗС по ошибке | ЛФЧХ ЗС по ошибке
W4im(ω) := Im(W3(ω*1i))
W4re(ω) := Re(W3(ω*1i))
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# АФЧХ ЗС по ошибке
