W1(s) := 6/(2*s^2 + 0.68*s + 1)  # ОУ
W2(s) := 2/(0.17*s + 1)  # ИУ
# Передаточная ф-ция для замкнутой цепи
Wzx := k*W2(s)*W1(s)/(1 + k*W2(s)*W1(s))
Wzx → 12*k/((12*k/((0.17*s + 1)*(0.68*s + 2*s^2 + 1)) + 1)*(0.17*s + 1)*(0.68*s + 2*s^2 + 1)) simplify → 30000.0*k/(850.0*s^3 + 5289.0*s^2 + 2125.0*s + 30000.0*k + 2500.0)
A(ω) := 850*(ω*1i)^3 + 5289*(ω*1i)^2 + 2125*(ω*1i) + 30000*k + 2500
A(ω) := 0
850*(ω*1i)^3 + 5289*(ω*1i)^2 + 2125*(ω*1i) + 30000*k + 2500 = 0
k := (-850*(ω*1i)^3 - 5289*(ω*1i)^2 - 2125*(ω*1i) - 2500)/30000
k → 17i*ω^3/600 + 1763*ω^2/10000 - 17i*ω/240 - 1/12
# Передаточная ф-ция для разомкнутой цепи
Wrx := k*W1(s)*W2(s)
Wrx → -(1 - 5289*ω^2/2500 + 17i*ω/20 - 17i*ω^3/50)/((0.17*s + 1)*(0.68*s + 2*s^2 + 1)) simplify → (5289.0*ω^2 - 2125.0i*ω - 2500.0 + 850.0i*ω^3)/(850.0*s^3 + 5289.0*s^2 + 2125.0*s + 2500.0)
Wrx := 30000*k/(850*s^3 + 5289*s^2 + 2125*s + 2500)
