Wp(s) := 12/((2*s^2 + 0.68*s + 1)*(0.17*s + 1)) expand → 12/(0.17*s + 0.68*s + 2*s^2 + 0.34*s^3 + 0.1156*s^2 + 1) collect → 30000.0/(850.0*s^3 + 5289.0*s^2 + 2125.0*s + 2500.0)
Q(k, s) := 850*s^3 + 5289*s^2 + 2125*s + 30000*k + 2500
W(k, s) := 30000*k/(850*s^3 + 5289*s^2 + 2125*s + 2500)
H(k) := [5289, 30000*k + 2500, 0; 850, 2125, 0; 0, 5289, 30000*k + 2500]
Δ1 := |[5289]|
Δ2(k) := det([5289, 30000*k + 2500; 850, 2125]) → 9114125 - 25500000*k
Δ2(0.357) = 10625
# Критерий устойчивости 1: Δ2(k)>0
k_кр1 := 9114125/25500000 = 0.357417
k := k_кр1
k1 := 0.95*k_кр1
k2 := 1.05*k_кр1
h1(t) := W(k, s)*1/s invlaplace → 4.289 - 4.22421554382*cos(0.686367248636*t)*e^(-0.17*t) - 1.60147746117*sin(0.686367248636*t)*e^(-0.17*t) - 0.0647844561752*e^(-5.88235294118*t)
k := k1
h11(t) := W(k, s)*1/s invlaplace → 4.07455 - 4.01300476663*cos(0.686367248636*t)*e^(-0.17*t) - 1.52140358811*sin(0.686367248636*t)*e^(-0.17*t) - 0.0615452333664*e^(-5.88235294118*t)
k := k2
h12(t) := W(k, s)*1/s invlaplace → 4.50345 - 4.43542632102*cos(0.686367248636*t)*e^(-0.17*t) - 1.68155133423*sin(0.686367248636*t)*e^(-0.17*t) - 0.068023678984*e^(-5.88235294118*t)
# Критерий устойчивости 2: 30000k + 2500 = 0
k_кр2 := -2500/30000 = -0.0833333
k3 := 0.95*k_кр2
k4 := 1.05*k_кр2
k := k_кр2
h2(t) := W(k, s)*1/s invlaplace → 0.0151047927664*e^(-5.88235294118*t) + 0.984895207234*cos(0.686367248636*t)*e^(-0.17*t) + 0.373391807221*sin(0.686367248636*t)*e^(-0.17*t) - 1
k := k3
h21(t) := W(k, s)*1/s invlaplace → 0.0143495531281*e^(-5.88235294118*t) + 0.935650446872*cos(0.686367248636*t)*e^(-0.17*t) + 0.35472221686*sin(0.686367248636*t)*e^(-0.17*t) - 0.95
k := k4
h22(t) := W(k, s)*1/s invlaplace → 0.0158600324047*e^(-5.88235294118*t) + 1.0341399676*cos(0.686367248636*t)*e^(-0.17*t) + 0.392061397582*sin(0.686367248636*t)*e^(-0.17*t) - 1.05
t := 0, 0.01 .. 100
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